# [component: outputs uprugost]
uprugost = [
    -50, 6.356e-6;
    -45, 1.111e-5;
    -40, 1.891e-5;
    -35, 3.139e-5;
    -30, 5.088e-5;
    -25, 8.07e-5;
    -20, 0.0001254;
    -15, 0.0001912;
    -10, 0.0002863;
    -5, 0.0004215;
    0, 0.0006108;
    5, 0.0008719;
    10, 0.001227;
    15, 0.001704;
    20, 0.002337;
    25, 0.003167;
    30, 0.004243;
    35, 0.005624;
    40, 0.007377;
    45, 0.009585;
    50, 0.01234
]
N := rows(uprugost) - 1 = 20
i := 0 .. N
g := [1; 1; 1]
X[i + 1] := uprugost[i, 0]
Y[i + 1] := uprugost[i, 1]
X[0] := -273.15
Y[0] := 0
N := N + 1 = 21
int_exp := expfit(X, Y, g) = [0.000862489; 0.0536901; -0.00014409]
a := int_exp[0] = 0.000862489
b := int_exp[1] = 0.0536901
c := int_exp[2] = -0.00014409
F_exp(x) := a*exp(b*x) + c
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F_exp(-50) = -8.52208e-5
T := -80
w_0(e) := 2.167*10^6/(T + 273.15)*e
w_0(linterp(X, Y, T)) = 0.0617228
w_0(F_exp(T)) = -1.48466
σ_y[i] := linterp(X, Y, X[i]) - F_exp(X[i])
σ_w[i] := w_0(linterp(X, Y, X[i])) - w_0(F_exp(X[i]))
Δw_0 := max(σ_w) = 1.61658
Δw := Δw_0*20 = 32.3316
w := w_0(linterp(X, Y, T))*20 = 1.23446
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