# [component: outputs uprugost]
uprugost = [
    -50, 6.356e-6;
    -45, 1.111e-5;
    -40, 1.891e-5;
    -35, 3.139e-5;
    -30, 5.088e-5;
    -25, 8.07e-5;
    -20, 0.0001254;
    -15, 0.0001912;
    -10, 0.0002863;
    -5, 0.0004215;
    0, 0.0006108;
    5, 0.0008719;
    10, 0.001227;
    15, 0.001704;
    20, 0.002337;
    25, 0.003167;
    30, 0.004243;
    35, 0.005624;
    40, 0.007377;
    45, 0.009585;
    50, 0.01234
]
N := rows(uprugost) - 1 = 20
i := 0 .. N
g := [1; 1; 1]
X[i] := uprugost[i, 0]
Y[i] := uprugost[i, 1]
int_exp := expfit(X, Y, g) = [0.0008762; 0.0533912; -0.000165209]
a := int_exp[0] = 0.0008762
b := int_exp[1] = 0.0533912
c := int_exp[2] = -0.000165209
F_exp(x) := a*exp(b*x) + c
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F_exp(-50) = -0.000104503
T := -80
w_0(e) := 2.167*10^6/(T + 273.15)*e
w_0(linterp(X, Y, T)) = -0.248709
w_0(F_exp(T)) = -1.71625
σ_y[i] := linterp(X, Y, X[i]) - F_exp(X[i])
σ_w[i] := w_0(linterp(X, Y, X[i])) - w_0(F_exp(X[i]))
Δw_0 := max(σ_w) = 1.42869
w := Δw_0*20 = 28.5739
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